Sat Feb 22 18:13:29 CST 2014
;; 1. Based on: run101
;; 2. Description: FINAL IV Arctigenin to AA + AG, IV, Adjust Vm and Km
;; x1. Author: RZ
$PROBLEM    METABOLISM OF ARCTIGENIN IN RATS AFTER IV - ADVAN6
$INPUT      ID TIME DV DOSE=AMT MDV CMT DL
$DATA       Arctigenin_IV_for_nonmem.csv IGNORE=@
$SUBROUTINE ADVAN6 TOL=6
$MODEL      COMP=(CENTRAL,DEFDOSE,DEFOBS) ; 1. Arctigenin (AR) central
            COMP=(AG_LIVER) ; 2. AG Liver,equal to central
            COMP=(AA_CENTR) ; 3. AA Central
$PK
K10= THETA(1)*EXP(ETA(1))		; elimination rate of AR from central comp
K20= THETA(2)*EXP(ETA(2))		; elimination rate of AG from Liver, not considering the transfer from Liver to Central
K30= THETA(3)*EXP(ETA(3))		; elimination rate of AA from central comp
V1=  THETA(4)*EXP(ETA(4))
S1=  V1
S2=  V1
S3=  V1
Fi1= THETA(5)*EXP(ETA(5))		; scale factor for blood hydrolysis
Fi2= THETA(6)*EXP(ETA(6))		; scale factor for liver glucuronidation
Km1= THETA(7)				; AA blood hydrolysis
Vm1= THETA(8)
Km2= THETA(9)				; AG liver glucuronidation
Vm2= THETA(10)
$DES
DADT(1)=-K10*A(1)-Fi1*Vm1*A(1)/(Km1*V1+A(1))-Fi2*Vm2*A(1)/(Km2*V1+A(1))
DADT(2)= Fi2*Vm2*A(1)/(Km2*V1+A(1))-K20*A(2)
DADT(3)= Fi1*Vm1*A(1)/(Km1*V1+A(1))-K30*A(3)

$ERROR
IPRED = F
W =1; SQRT(THETA(11)**2*IPRED**2 + THETA(12)**2)
Y = IPRED + W*EPS(1)
IRES = DV-IPRED
IWRES = IRES/W

$THETA  0 FIX ; K10
 (0,0.206) ; K20
 (0,0.132) ; K30
 (0,0.311) ; V1
 (0,1.6) ; Fi1
 (0,0.0638) ; Fi2
 13.53 FIX ; Km1
 0.292 FIX ; Vm1
 230 FIX ; Km2
 1.23 FIX ; Vm2
;(0, 0.1)  ; Prop.RE (sd)
;(0, 0.102) ; Add.RE (sd)
$OMEGA  0  FIX  ;    IIV K10
 0  FIX  ;    IIV K20
 0  FIX  ;    IIV K30
 0  FIX  ;     IIV V1
 0  FIX  ;    IIV Fi1
 0  FIX  ;    IIV Fi2
;(0.1) ; IIV V2
;(0.1) ; IIV V3
$SIGMA  0.326  ; Residual error
$ESTIMATION METHOD=0 MAXEVAL=999 NOABORT SIG=5 PRINT=1 POSTHOC
; Xpose
$COVARIANCE
$TABLE      ID TIME DV MDV CMT DL IPRED IWRES ONEHEADER NOPRINT
            FILE=sdtab113.tab
$TABLE      ID K10 K20 K30 V1 Fi1 Fi2 ONEHEADER NOPRINT
            FILE=patab113.tab

NM-TRAN MESSAGES
 WARNINGS AND ERRORS (IF ANY) FOR PROBLEM    1
 (WARNING  2) NM-TRAN INFERS THAT THE DATA ARE POPULATION.

1NONLINEAR MIXED EFFECTS MODEL PROGRAM (NONMEM) VERSION 7.2.0
 ORIGINALLY DEVELOPED BY STUART BEAL, LEWIS SHEINER, AND ALISON BOECKMANN
 CURRENT DEVELOPERS ARE ROBERT BAUER, ICON DEVELOPMENT SOLUTIONS,
 AND ALISON BOECKMANN. IMPLEMENTATION, EFFICIENCY, AND STANDARDIZATION
 PERFORMED BY NOUS INFOSYSTEMS.
 PROBLEM NO.:         1
 METABOLISM OF ARCTIGENIN IN RATS AFTER IV - ADVAN6
 TOT. NO. OF OBS RECS:      481
 TOT. NO. OF INDIVIDUALS:     18
 GENERAL NONLINEAR KINETICS MODEL (ADVAN6)
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 #TBLN:      1
 #METH: First Order
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
 #TERM:
0MINIMIZATION SUCCESSFUL
 NO. OF FUNCTION EVALUATIONS USED:      208
 NO. OF SIG. DIGITS IN FINAL EST.:  6.6

 #TERE:
 Elapsed estimation time in seconds:     0.69
 Elapsed covariance time in seconds:     0.30

 ********************                                   FIRST ORDER                                  ********************
 #OBJT:**************                       MINIMUM VALUE OF OBJECTIVE FUNCTION                      ********************
 #OBJV:********************************************    -1201.655       **************************************************

 ********************                                   FIRST ORDER                                  ********************
 ********************                             FINAL PARAMETER ESTIMATE                           ********************

 THETA - VECTOR OF FIXED EFFECTS PARAMETERS   *********
         TH 1      TH 2      TH 3      TH 4      TH 5      TH 6      TH 7      TH 8      TH 9      TH10
         0.00E+00  1.47E-01  1.45E-01  2.96E-01  1.70E+00  1.16E+00  1.35E+01  2.92E-01  2.30E+02  1.23E+00

 OMEGA - COV MATRIX FOR RANDOM EFFECTS - ETAS  ********
            ETA1      ETA2      ETA3      ETA4      ETA5      ETA6
 ETA1
+        0.00E+00
 ETA2
+        0.00E+00  0.00E+00
 ETA3
+        0.00E+00  0.00E+00  0.00E+00
 ETA4
+        0.00E+00  0.00E+00  0.00E+00  0.00E+00
 ETA5
+        0.00E+00  0.00E+00  0.00E+00  0.00E+00  0.00E+00
 ETA6
+        0.00E+00  0.00E+00  0.00E+00  0.00E+00  0.00E+00  0.00E+00

 SIGMA - COV MATRIX FOR RANDOM EFFECTS - EPSILONS  ****
            EPS1
 EPS1
+        3.03E-02

 OMEGA - CORR MATRIX FOR RANDOM EFFECTS - ETAS  *******
            ETA1      ETA2      ETA3      ETA4      ETA5      ETA6
 ETA1
+        0.00E+00
 ETA2
+        0.00E+00  0.00E+00
 ETA3
+        0.00E+00  0.00E+00  0.00E+00
 ETA4
+        0.00E+00  0.00E+00  0.00E+00  0.00E+00
 ETA5
+        0.00E+00  0.00E+00  0.00E+00  0.00E+00  0.00E+00
 ETA6
+        0.00E+00  0.00E+00  0.00E+00  0.00E+00  0.00E+00  0.00E+00

 SIGMA - CORR MATRIX FOR RANDOM EFFECTS - EPSILONS  ***
            EPS1
 EPS1
+        1.74E-01

 ********************                                   FIRST ORDER                                  ********************
 ********************                            STANDARD ERROR OF ESTIMATE                          ********************

 THETA - VECTOR OF FIXED EFFECTS PARAMETERS   *********
         TH 1      TH 2      TH 3      TH 4      TH 5      TH 6      TH 7      TH 8      TH 9      TH10
        .........  3.70E-02  7.00E-03  1.42E-02  4.95E-02  2.99E-01 ......... ......... ......... .........

 OMEGA - COV MATRIX FOR RANDOM EFFECTS - ETAS  ********
            ETA1      ETA2      ETA3      ETA4      ETA5      ETA6
 ETA1
+       .........
 ETA2
+       ......... .........
 ETA3
+       ......... ......... .........
 ETA4
+       ......... ......... ......... .........
 ETA5
+       ......... ......... ......... ......... .........
 ETA6
+       ......... ......... ......... ......... ......... .........

 SIGMA - COV MATRIX FOR RANDOM EFFECTS - EPSILONS  ****
            EPS1
 EPS1
+        8.30E-03

 OMEGA - CORR MATRIX FOR RANDOM EFFECTS - ETAS  *******
            ETA1      ETA2      ETA3      ETA4      ETA5      ETA6
 ETA1
+       .........
 ETA2
+       ......... .........
 ETA3
+       ......... ......... .........
 ETA4
+       ......... ......... ......... .........
 ETA5
+       ......... ......... ......... ......... .........
 ETA6
+       ......... ......... ......... ......... ......... .........

 SIGMA - CORR MATRIX FOR RANDOM EFFECTS - EPSILONS  ***
            EPS1
 EPS1
+        2.39E-02
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