Sat Feb 22 18:13:10 CST 2014
;; 1. Based on: run113
;; 2. Description: FINAL IV Arctigenin to AA + AG, IV, KL, KB
;; x1. Author: RZ
$PROBLEM    METABOLISM OF ARCTIGENIN IN RATS AFTER IV - ADVAN6
$INPUT      ID TIME DV DOSE=AMT MDV CMT DL
$DATA       Arctigenin_IV_for_nonmem.csv IGNORE=@
$SUBROUTINE ADVAN6 TOL=6
$MODEL      COMP=(CENTRAL,DEFDOSE,DEFOBS) ; 1. Arctigenin (AR) central
            COMP=(AG_LIVER) ; 2. AG Liver,equal to central
            COMP=(AA_CENTR) ; 3. AA Central
$PK
K10= THETA(1)*EXP(ETA(1))		; elimination rate constant of AR from central comp
K20= THETA(2)*EXP(ETA(2))		; elimination rate constant of AG from Liver, not considering the transfer from Liver to Central
K30= THETA(3)*EXP(ETA(3))		; elimination rate constant of AA from central comp
V1=  THETA(4)*EXP(ETA(4))
S1=  V1
S2=  V1
S3=  V1
KB=  THETA(5)*EXP(ETA(5))		; Metabolism rate constant in Blood
KL=  THETA(6)*EXP(ETA(6))		; Metabolism rate constant in Liver

$DES

DADT(1)=-K10*A(1)-KB*A(1)-KL*A(1)
DADT(2)= KL*A(1)-K20*A(2)
DADT(3)= KB*A(1)-K30*A(3)

$ERROR
Y = F + EPS(1)

$THETA  0 FIX ; K10
 (0,0.206) ; K20
 (0,0.132) ; K30
 (0,0.3) ; V1(L)
 (0,0.1) ; KB
 (0,0.1) ; KL
$OMEGA  0  FIX  ;    IIV K10
 0  FIX  ;    IIV K20
 0  FIX  ;    IIV K30
 0  FIX  ;     IIV V1
 0  FIX  ;     IIV KB
 0  FIX  ;     IIV KL
$SIGMA  0.01  ; Residual error
$ESTIMATION METHOD=0 MAXEVAL=999 NOABORT SIG=5 PRINT=1 POSTHOC
; Xpose
$COVARIANCE
$TABLE      ID TIME DV MDV CMT DL ONEHEADER NOPRINT FILE=sdtab129.tab

NM-TRAN MESSAGES
 WARNINGS AND ERRORS (IF ANY) FOR PROBLEM    1
 (WARNING  2) NM-TRAN INFERS THAT THE DATA ARE POPULATION.

1NONLINEAR MIXED EFFECTS MODEL PROGRAM (NONMEM) VERSION 7.2.0
 ORIGINALLY DEVELOPED BY STUART BEAL, LEWIS SHEINER, AND ALISON BOECKMANN
 CURRENT DEVELOPERS ARE ROBERT BAUER, ICON DEVELOPMENT SOLUTIONS,
 AND ALISON BOECKMANN. IMPLEMENTATION, EFFICIENCY, AND STANDARDIZATION
 PERFORMED BY NOUS INFOSYSTEMS.
 PROBLEM NO.:         1
 METABOLISM OF ARCTIGENIN IN RATS AFTER IV - ADVAN6
 TOT. NO. OF OBS RECS:      481
 TOT. NO. OF INDIVIDUALS:     18
 GENERAL NONLINEAR KINETICS MODEL (ADVAN6)
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 #TBLN:      1
 #METH: First Order
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
 #TERM:
0MINIMIZATION SUCCESSFUL
 NO. OF FUNCTION EVALUATIONS USED:      217
 NO. OF SIG. DIGITS IN FINAL EST.:  6.0

 #TERE:
 Elapsed estimation time in seconds:     0.70
 Elapsed covariance time in seconds:     0.23

 ********************                                   FIRST ORDER                                  ********************
 #OBJT:**************                       MINIMUM VALUE OF OBJECTIVE FUNCTION                      ********************
 #OBJV:********************************************    -1233.503       **************************************************

 ********************                                   FIRST ORDER                                  ********************
 ********************                             FINAL PARAMETER ESTIMATE                           ********************

 THETA - VECTOR OF FIXED EFFECTS PARAMETERS   *********
         TH 1      TH 2      TH 3      TH 4      TH 5      TH 6
         0.00E+00  1.80E-01  1.40E-01  2.89E-01  1.01E-01  2.44E-02

 OMEGA - COV MATRIX FOR RANDOM EFFECTS - ETAS  ********
            ETA1      ETA2      ETA3      ETA4      ETA5      ETA6
 ETA1
+        0.00E+00
 ETA2
+        0.00E+00  0.00E+00
 ETA3
+        0.00E+00  0.00E+00  0.00E+00
 ETA4
+        0.00E+00  0.00E+00  0.00E+00  0.00E+00
 ETA5
+        0.00E+00  0.00E+00  0.00E+00  0.00E+00  0.00E+00
 ETA6
+        0.00E+00  0.00E+00  0.00E+00  0.00E+00  0.00E+00  0.00E+00

 SIGMA - COV MATRIX FOR RANDOM EFFECTS - EPSILONS  ****
            EPS1
 EPS1
+        2.83E-02

 OMEGA - CORR MATRIX FOR RANDOM EFFECTS - ETAS  *******
            ETA1      ETA2      ETA3      ETA4      ETA5      ETA6
 ETA1
+        0.00E+00
 ETA2
+        0.00E+00  0.00E+00
 ETA3
+        0.00E+00  0.00E+00  0.00E+00
 ETA4
+        0.00E+00  0.00E+00  0.00E+00  0.00E+00
 ETA5
+        0.00E+00  0.00E+00  0.00E+00  0.00E+00  0.00E+00
 ETA6
+        0.00E+00  0.00E+00  0.00E+00  0.00E+00  0.00E+00  0.00E+00

 SIGMA - CORR MATRIX FOR RANDOM EFFECTS - EPSILONS  ***
            EPS1
 EPS1
+        1.68E-01

 ********************                                   FIRST ORDER                                  ********************
 ********************                            STANDARD ERROR OF ESTIMATE                          ********************

 THETA - VECTOR OF FIXED EFFECTS PARAMETERS   *********
         TH 1      TH 2      TH 3      TH 4      TH 5      TH 6
        .........  3.74E-02  5.58E-03  1.42E-02  4.30E-03  4.65E-03

 OMEGA - COV MATRIX FOR RANDOM EFFECTS - ETAS  ********
            ETA1      ETA2      ETA3      ETA4      ETA5      ETA6
 ETA1
+       .........
 ETA2
+       ......... .........
 ETA3
+       ......... ......... .........
 ETA4
+       ......... ......... ......... .........
 ETA5
+       ......... ......... ......... ......... .........
 ETA6
+       ......... ......... ......... ......... ......... .........

 SIGMA - COV MATRIX FOR RANDOM EFFECTS - EPSILONS  ****
            EPS1
 EPS1
+        7.75E-03

 OMEGA - CORR MATRIX FOR RANDOM EFFECTS - ETAS  *******
            ETA1      ETA2      ETA3      ETA4      ETA5      ETA6
 ETA1
+       .........
 ETA2
+       ......... .........
 ETA3
+       ......... ......... .........
 ETA4
+       ......... ......... ......... .........
 ETA5
+       ......... ......... ......... ......... .........
 ETA6
+       ......... ......... ......... ......... ......... .........

 SIGMA - CORR MATRIX FOR RANDOM EFFECTS - EPSILONS  ***
            EPS1
 EPS1
+        2.30E-02
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