;; 1. Based on: run148
;; 2. Description: FINAL IG, Three dose, CL, BIO, Dose-related Km
;; x1. Author: user

$PROBLEM  METABOLISM OF ARCTIGENIN IN RATS AFTER IV - ADVAN6
$DATA   Arctigenin_IG_for_nonmem.csv IGNORE=@
$INPUT  ID TIME DV DOSE=AMT MDV CMT DL
$SUBROUTINE ADVAN6 TOL=6
$MODEL
COMP=(LUMEN DEFDOSE)			; 1. intestine lumen
COMP=(AG_CENTR)				; 2. AG in central
COMP=(AA_CENTR)				; 3. AA in Central
COMP=(INTESTIN)				; 4. Intestine compartment
;COMP=(AG_INTES)			; 5. AG in intestine
;COMP=(AG_PER)				; 5. AG in perp
;COMP=(AA_PER)				; 6. AA in perp

$PK
Ka = THETA(1)*EXP(ETA(1))		; absorption rate of AR
K2e= THETA(2)*EXP(ETA(2))		; elimination rate of AG from Central
K3e= THETA(3)*EXP(ETA(3))		; elimination rate of AA from central comp
V2=  THETA(4)				; volume of central
S2=  V2
S3=  V2
Kmi= THETA(5)*EXP(ETA(4))		; Metabolic rate of intestine microsome
Kmb= THETA(6)*EXP(ETA(5))		; Metabolic rate of Blood
F1= THETA(7)*EXP(ETA(6))		; Bioavailability
C50= THETA(8)*EXP(ETA(7))		; Dose at 1/2*Km

K20=K2e
K30=K3e

$DES
;IF(DL==1) tKi=Ki*1.314277
;IF(DL==2) tKi=Ki
;IF(DL==3) tKi=Ki*0.610052
tKi=Kmi/(1+DL/C50)

DADT(1)=-Ka*A(1)
DADT(2)= tKi*A(4)-K20*A(2)
DADT(3)= Kmb*A(4)-K30*A(3)
DADT(4)= Ka*A(1)-tKi*A(4)-Kmb*A(4)

$ERROR
Y = F+ERR(1)

$THETA
(0, 30) ; Ka(1/min)
(0, 0.5, 4) ; K2e(1/min)
(0, 1.5, 5) ; K3e(1/min)
(0, 3) ; V2(L)
(0, 0.2) ; Kmi (1/min)
(0, 0.101) FIX ; Kmb (1/min)
(0,0.01,1) ; BIO
(0,1)	   ; C50(umol)

$OMEGA
0 FIX ; IIV Ka
0 FIX ; IIV K20
0 FIX ; IIV K30
0 FIX ; IIV Ki
0 FIX ; IIV Kb
0 FIX ; IIV BIO
0 FIX ; IIV C50

$SIGMA
0.000432 ; Residual error

$EST METHOD=0 MAXEVAL=999 NOABORT SIG=5 PRINT=1
$COV

; Xpose
$TABLE ID TIME DV MDV CMT DL ONEHEADER NOPRINT FILE=sdtab149.tab
$TABLE ID Ka K20 K30 V2 ONEHEADER NOPRINT FILE=patab149.tab
