Sat Feb 22 18:32:39 CST 2014
;; 1. Based on: run154
;; 2. Description: Good IV+IG, Three dose, CL, BIO, 7 CMTs
;; x1. Author: user
$PROBLEM    METABOLISM OF ARCTIGENIN IN RATS AFTER IV AND IG - ADVAN6
$INPUT      ID TIME DV DOSE=AMT MDV CMT EVID DL RTE
$DATA       Arctigenin_IG+IV_for_nonmem.csv IGNORE=@
$SUBROUTINE ADVAN6 TRANS1 TOL=9
$MODEL      COMP=(LUMEN DEFDOSE) ; 1. intestine lumen
            COMP=(AR_CENTR) ; 2. AR in central
            COMP=(AG_CENTR) ; 3. AG in central
            COMP=(AA_CENTR) ; 4. AA in Central
            COMP=(AR_INTES) ; 5. AR in Intestine
            COMP=(AG_INTES) ; 5. AG in Intestine
            COMP=(AA_INTES) ; 5. AA in Intestine
$PK
KA = THETA(1)*EXP(ETA(1))		; absorption rate constant of AR

K20= THETA(2)*EXP(ETA(2))		; elimination rate constant of AG from Central
K30= THETA(3)*EXP(ETA(3))		; elimination rate constant of AA from central comp
V2 = THETA(4)*EXP(ETA(4))		; volume of central
S2 = V2
S3 = V2
S4 = V2
Ki= THETA(5)*EXP(ETA(5))		; Metabolism rate constant in intestine
Kb= THETA(6)*EXP(ETA(6))		; Metabolism rate constant in Blood
Kl= THETA(7)*EXP(ETA(7))		; Metabolism rate constant in Liver
F1 = THETA(8)*EXP(ETA(8))		; Bioavailability
K10= THETA(9)*EXP(ETA(9))		; elimination rate constant of AR from Central
K52= THETA(10)*EXP(ETA(10))

$DES

DADT(1)=-KA*A(1)
DADT(2) = K52*A(5)-Kb*A(2)-Kl*A(2)-K10*A(2)
DADT(3) = Ki*A(6)+Kl*A(2)-K20*A(3)
DADT(4) = Kb*A(7)+Kb*A(2)-K30*A(4)
DADT(5) = KA*A(1)-Ki*A(5)-Kb*A(5)-K52*A(5)
DADT(6) = Ki*A(5)-Ki*A(6)
DADT(7) = Kb*A(5)-Kb*A(7)

$ERROR
Y = F+ERR(1)

$THETA  (0,0.03) ; KA(1/min)
 (0,0.1) ; K20(1/min)
 (0,0.1) ; K30(1/min)
 (0,0.3) ; V2(L)
 (0,0.15) ; Ki(1/min)
 (0,0.15) ; Kb(1/min)
 (0,0.05) ; Kl(1/min)
 (0,0.01,1) ; F1
 0 FIX ; K10
 0 FIX ; K52
$OMEGA  0  FIX  ;     IIV KA
 0  FIX  ;    IIV K20
 0  FIX  ;    IIV K30
 0  FIX  ;     IIV V2
 0  FIX  ;     IIV Ki
 0  FIX  ;     IIV Kb
 0  FIX  ;     IIV Kl
 0  FIX  ;    IIV BIO
 0  FIX  ;    IIV K10
 0  FIX  ;    IIV K52
$SIGMA  0.01  ; Residual error
$ESTIMATION METHOD=0 MAXEVAL=999 NOABORT SIG=5 PRINT=1
; Xpose
$COVARIANCE
$TABLE      ID TIME DV MDV CMT DL RTE ONEHEADER NOPRINT
            FILE=sdtab155.tab
$TABLE      ID Ka K20 K30 V2 ONEHEADER NOPRINT FILE=patab155.tab

NM-TRAN MESSAGES
 WARNINGS AND ERRORS (IF ANY) FOR PROBLEM    1
 (WARNING  2) NM-TRAN INFERS THAT THE DATA ARE POPULATION.

1NONLINEAR MIXED EFFECTS MODEL PROGRAM (NONMEM) VERSION 7.2.0
 ORIGINALLY DEVELOPED BY STUART BEAL, LEWIS SHEINER, AND ALISON BOECKMANN
 CURRENT DEVELOPERS ARE ROBERT BAUER, ICON DEVELOPMENT SOLUTIONS,
 AND ALISON BOECKMANN. IMPLEMENTATION, EFFICIENCY, AND STANDARDIZATION
 PERFORMED BY NOUS INFOSYSTEMS.
 PROBLEM NO.:         1
 METABOLISM OF ARCTIGENIN IN RATS AFTER IV AND IG - ADVAN6
 TOT. NO. OF OBS RECS:      735
 TOT. NO. OF INDIVIDUALS:     34
 GENERAL NONLINEAR KINETICS MODEL (ADVAN6)
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 #TBLN:      1
 #METH: First Order
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
 #TERM:
0MINIMIZATION SUCCESSFUL
 NO. OF FUNCTION EVALUATIONS USED:      354
 NO. OF SIG. DIGITS IN FINAL EST.:  5.4

 #TERE:
 Elapsed estimation time in seconds:     4.15
 Elapsed covariance time in seconds:     2.34

 ********************                                   FIRST ORDER                                  ********************
 #OBJT:**************                       MINIMUM VALUE OF OBJECTIVE FUNCTION                      ********************
 #OBJV:********************************************    -2192.679       **************************************************

 ********************                                   FIRST ORDER                                  ********************
 ********************                             FINAL PARAMETER ESTIMATE                           ********************

 THETA - VECTOR OF FIXED EFFECTS PARAMETERS   *********
         TH 1      TH 2      TH 3      TH 4      TH 5      TH 6      TH 7      TH 8      TH 9      TH10
         1.73E-02  1.79E-01  1.40E-01  2.89E-01  1.12E-01  1.01E-01  2.43E-02  6.76E-02  0.00E+00  0.00E+00

 OMEGA - COV MATRIX FOR RANDOM EFFECTS - ETAS  ********
            ETA1      ETA2      ETA3      ETA4      ETA5      ETA6      ETA7      ETA8      ETA9      ET10
 ETA1
+        0.00E+00
 ETA2
+        0.00E+00  0.00E+00
 ETA3
+        0.00E+00  0.00E+00  0.00E+00
 ETA4
+        0.00E+00  0.00E+00  0.00E+00  0.00E+00
 ETA5
+        0.00E+00  0.00E+00  0.00E+00  0.00E+00  0.00E+00
 ETA6
+        0.00E+00  0.00E+00  0.00E+00  0.00E+00  0.00E+00  0.00E+00
 ETA7
+        0.00E+00  0.00E+00  0.00E+00  0.00E+00  0.00E+00  0.00E+00  0.00E+00
 ETA8
+        0.00E+00  0.00E+00  0.00E+00  0.00E+00  0.00E+00  0.00E+00  0.00E+00  0.00E+00
 ETA9
+        0.00E+00  0.00E+00  0.00E+00  0.00E+00  0.00E+00  0.00E+00  0.00E+00  0.00E+00  0.00E+00
 ET10
+        0.00E+00  0.00E+00  0.00E+00  0.00E+00  0.00E+00  0.00E+00  0.00E+00  0.00E+00  0.00E+00  0.00E+00

 SIGMA - COV MATRIX FOR RANDOM EFFECTS - EPSILONS  ****
            EPS1
 EPS1
+        1.86E-02

 OMEGA - CORR MATRIX FOR RANDOM EFFECTS - ETAS  *******
            ETA1      ETA2      ETA3      ETA4      ETA5      ETA6      ETA7      ETA8      ETA9      ET10
 ETA1
+        0.00E+00
 ETA2
+        0.00E+00  0.00E+00
 ETA3
+        0.00E+00  0.00E+00  0.00E+00
 ETA4
+        0.00E+00  0.00E+00  0.00E+00  0.00E+00
 ETA5
+        0.00E+00  0.00E+00  0.00E+00  0.00E+00  0.00E+00
 ETA6
+        0.00E+00  0.00E+00  0.00E+00  0.00E+00  0.00E+00  0.00E+00
 ETA7
+        0.00E+00  0.00E+00  0.00E+00  0.00E+00  0.00E+00  0.00E+00  0.00E+00
 ETA8
+        0.00E+00  0.00E+00  0.00E+00  0.00E+00  0.00E+00  0.00E+00  0.00E+00  0.00E+00
 ETA9
+        0.00E+00  0.00E+00  0.00E+00  0.00E+00  0.00E+00  0.00E+00  0.00E+00  0.00E+00  0.00E+00
 ET10
+        0.00E+00  0.00E+00  0.00E+00  0.00E+00  0.00E+00  0.00E+00  0.00E+00  0.00E+00  0.00E+00  0.00E+00

 SIGMA - CORR MATRIX FOR RANDOM EFFECTS - EPSILONS  ***
            EPS1
 EPS1
+        1.36E-01

 ********************                                   FIRST ORDER                                  ********************
 ********************                            STANDARD ERROR OF ESTIMATE                          ********************

 THETA - VECTOR OF FIXED EFFECTS PARAMETERS   *********
         TH 1      TH 2      TH 3      TH 4      TH 5      TH 6      TH 7      TH 8      TH 9      TH10
         1.25E-02  3.68E-02  5.53E-03  1.42E-02  3.01E-02  4.29E-03  4.59E-03  2.79E-02 ......... .........

 OMEGA - COV MATRIX FOR RANDOM EFFECTS - ETAS  ********
            ETA1      ETA2      ETA3      ETA4      ETA5      ETA6      ETA7      ETA8      ETA9      ET10
 ETA1
+       .........
 ETA2
+       ......... .........
 ETA3
+       ......... ......... .........
 ETA4
+       ......... ......... ......... .........
 ETA5
+       ......... ......... ......... ......... .........
 ETA6
+       ......... ......... ......... ......... ......... .........
 ETA7
+       ......... ......... ......... ......... ......... ......... .........
 ETA8
+       ......... ......... ......... ......... ......... ......... ......... .........
 ETA9
+       ......... ......... ......... ......... ......... ......... ......... ......... .........
 ET10
+       ......... ......... ......... ......... ......... ......... ......... ......... ......... .........

 SIGMA - COV MATRIX FOR RANDOM EFFECTS - EPSILONS  ****
            EPS1
 EPS1
+        5.59E-03

 OMEGA - CORR MATRIX FOR RANDOM EFFECTS - ETAS  *******
            ETA1      ETA2      ETA3      ETA4      ETA5      ETA6      ETA7      ETA8      ETA9      ET10
 ETA1
+       .........
 ETA2
+       ......... .........
 ETA3
+       ......... ......... .........
 ETA4
+       ......... ......... ......... .........
 ETA5
+       ......... ......... ......... ......... .........
 ETA6
+       ......... ......... ......... ......... ......... .........
 ETA7
+       ......... ......... ......... ......... ......... ......... .........
 ETA8
+       ......... ......... ......... ......... ......... ......... ......... .........
 ETA9
+       ......... ......... ......... ......... ......... ......... ......... ......... .........
 ET10
+       ......... ......... ......... ......... ......... ......... ......... ......... ......... .........

 SIGMA - CORR MATRIX FOR RANDOM EFFECTS - EPSILONS  ***
            EPS1
 EPS1
+        2.05E-02
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